ADC_ref := 3.3 V
PGA := 16
R_1 := 1500 Ω
R_2 := 22000 Ω
R_3 := 2200 Ω
G := 1/(R_1*(1/R_1 + 1/R_2 + 1/R_3))*PGA = 9.14286
V_offset := ADC_ref/(R_2*(1/R_1 + 1/R_2 + 1/R_3))*PGA = 2.05714 V
R_sense := 0.015 Ω  # OBS. This has been changed from the original 3 mOhm sense resistor
I := 5 A
V_sense := I*R_sense = 75 mV
V_ADC_range := G*V_sense = 0.685714 V
V_ADC_input_max := V_offset + V_ADC_range = 2.74286 V
ADC_res := 2^12 - 1 = 4095
ADC_meas := V_ADC_range/ADC_ref*ADC_res = 850.909
I_res := ADC_meas/I = 0.170182 1/mA
I_prADCstep := I/ADC_meas = 5.87607 mA
ADC_v_to_I_sense := 1/(R_sense*G) = 7.29167 1/Ω
I := 2.79 A
U := 8.883 V
8.75 V/(2.7 Ω) = 3.24074 A
ADC_v_to_I_sense*75*mV = 0.546875 A
R := U/I = 3.18387 Ω
9 V/(I_prADCstep*75) = 20.4218 Ω
75 mV/(3.3 V)*4096 = 93.0909
I := 1.5 A
U := 9 V
90/4095*3.3*V = 72.5275 mV
R := U/I = 6 Ω
I_prADCstep*4 = 0.0235043 A
ADC_Vin := 1073
ADC_Vin/4095*3.3*V*(18 kΩ/(169 kΩ + 18 kΩ))^-1 = 8.98315 V
